// SBML level 3 version 1

model driver()
  // driver translated by MOCCASIN

  // Compartments:
  compartment compartmentOne = 1;

  // Species:
  species y__1 in compartmentOne = 14;
  species y__2 in compartmentOne = 7.7;
  species y__3 in compartmentOne = 1.2;
  species y__4 in compartmentOne = 1.9;
  species y__5 in compartmentOne = 0.21;
  species y__6 in compartmentOne = 0.1;
  species y__7 in compartmentOne = 0.88;
  species y__8 in compartmentOne = 0.57;
  species y__9 in compartmentOne = 0.31;
  species y__10 in compartmentOne = 0.061;
  species y__11 in compartmentOne = 0.0067;
  species y__12 in compartmentOne = 0.34;
  species y__13 in compartmentOne = 0.049;
  species y__14 in compartmentOne = 0.054;
  species y__15 in compartmentOne = 8.1;
  species y__16 in compartmentOne = 19;
  species y__17 in compartmentOne = 0;
  species y__18 in compartmentOne = 36;

  // Parameters:
  alpha_ldh = 1;
  alpha_pfk1 = 0.75;
  alpha_pgk = 1;
  beta_ldh = 1;
  beta_pfk1 = 1.18;
  beta_pgk = 1;
  cCIT = 0.51;
  cPi = 7.5;
  E4P = 0.18;
  f1_glut = 0.1;
  f1_hk = 0.01;
  f2_glut = 0.9;
  f2_hk = 0.99;
  F26BP = 0.0034;
  hours = 24;
  K2pg_eno = 0.038;
  K2pg_pgam = 0.12;
  K3pg_pgam = 0.19;
  K6pg_hpi = 0.015;
  Ka_pgk = 0.079;
  Kadp_hk = 3.5;
  Kadp_pfk1 = 5;
  Kadp_pyk = 0.4;
  Katp_hk = 1.1;
  Katp_pfk1 = 0.0292;
  Katp_pyk = 0.86;
  Kb_pgk = 0.04;
  Kbpg_gapdh = 0.022;
  Kcit_pfk1 = 6.7;
  Kdhap_aldo = 0.08;
  Kdhap_tpi = 1.6;
  Keq1_glut = 1;
  Keq_glut = 1;
  Keq_hk = 651;
  Keq_mct1 = 1;
  Keq_pfk1 = 247;
  Keq_pyk = 195170;
  Kery4p_hpi = 0.001;
  Kf6p_hpi = 0.05;
  Kf6p_pfk1 = 1.1;
  Kf26bp_pfk1 = 0.00099;
  Kfbp_aldo = 0.009;
  Kfbp_hpi = 0.06;
  Kfbp_pfk1 = 5;
  Kg3p_aldo = 0.16;
  Kg3p_gapdh = 0.19;
  Kg3p_tpi = 0.51;
  Kg6p_hk = 0.02;
  Kg6p_hpi = 0.4;
  Kgluin1_glut = 10;
  Kgluin2_hk = 0.3;
  Kgluin_glut = 10;
  Kgluin_hk = 0.03;
  Kgluout1_glut = 9.3;
  Kgluout_glut = 1.8;
  Kiatp_pfk1 = 1.1;
  Klacin_ldh = 4.7;
  Klacin_mct1 = 8.5;
  Klacout_mct1 = 0.5;
  Knad_gapdh = 0.09;
  Knad_ldh = 0.07;
  Knadh_gapdh = 0.01;
  Knadh_ldh = 0.002;
  Kp_pgk = 0.13;
  Kpep_eno = 0.06;
  Kpep_pyk = 0.05;
  Kpi_gapdh = 11;
  Kpyr_ldh = 0.3;
  Kpyr_pyk = 10;
  Kq_pgk = 0.27;
  L_pfk1 = 6.6;
  sixPG = 0.0045;
  Vf_aldo = 0.08;
  Vf_eno = 0.34;
  Vf_gapdh = 0.331;
  Vf_glut = 0.028;
  Vf_hk = 0.041;
  Vf_hpi = 0.28;
  Vf_ldh = 0.0468;
  Vf_mct1 = 1.45;
  Vf_pfk1 = 0.022;
  Vf_pgam = 0.94;
  Vf_pgk = 8.7;
  Vf_pyk = 0.087;
  Vf_tpi = 3.4;
  Vr_aldo = 0.063;
  Vr_eno = 0.38;
  Vr_gapdh = 0.413;
  Vr_hpi = 0.63;
  Vr_ldh = 0.074;
  Vr_pgam = 0.36;
  Vr_pgk = 8.7;
  Vr_tpi = 28;

  // Assignment rules:
  ADP := y__4;
  ALDO_reaction := (Vf_aldo*(FBP/Kfbp_aldo) - Vr_aldo*(DHAP*G3P/(Kdhap_aldo*Kg3p_aldo)))/(1 + FBP/Kfbp_aldo + DHAP/Kdhap_aldo + G3P/Kg3p_aldo + DHAP*G3P/(Kdhap_aldo*Kg3p_aldo));
  ATP := y__2;
  D1_PFK := L_pfk1*(1 + cCIT/Kcit_pfk1)^4*(1 + ATP/Kiatp_pfk1)^4/(1 + F26BP/Kf26bp_pfk1)^4;
  D2_PFK := (1 + F6P*(1 + F26BP/(alpha_pfk1*Kf26bp_pfk1))/(Kf6p_pfk1*(1 + F26BP/Kf26bp_pfk1)))^4;
  DHAP := y__7;
  ENO_reaction := (Vf_eno*twoPG/K2pg_eno - Vr_eno*PEP/Kpep_eno)/(1 + twoPG/K2pg_eno + PEP/Kpep_eno);
  F6P := y__5;
  FBP := y__6;
  G3P := y__8;
  G6P := y__3;
  GAPDH_reaction := (Vf_gapdh*(NAD*G3P*cPi/(Knad_gapdh*Kg3p_gapdh*Kpi_gapdh)) - Vr_gapdh*(thirteenBPG*NADH/(Kbpg_gapdh*Knadh_gapdh)))/(1 + NAD/Knad_gapdh + NAD*G3P/(Knad_gapdh*Kg3p_gapdh) + NAD*G3P*cPi/(Knad_gapdh*Kg3p_gapdh*Kpi_gapdh) + thirteenBPG*NADH/(Kbpg_gapdh*Knadh_gapdh) + NADH/Knadh_gapdh);
  Glu_in := y__1;
  Glu_out := y__18;
  GLUT_reaction := Vf_glut*(0.2 + 0.8/(1 - 23.68/50))*(f1_glut*(Glu_out - Glu_in/Keq_glut)/(Kgluout_glut*(1 + Glu_in/Kgluin_glut) + Glu_out) + f2_glut*(Glu_out - Glu_in/Keq1_glut)/(Kgluout1_glut*(1 + Glu_in/Kgluin1_glut) + Glu_out));
  HK_reaction := Vf_hk*(0.2 + 0.8/(1 - 23.68/50))*(f1_hk/(Kgluin_hk*Katp_hk)*(Glu_in*ATP - G6P*ADP/Keq_hk)/(1 + Glu_in/Kgluin_hk + ATP/Katp_hk + Glu_in*ATP/(Kgluin_hk*Katp_hk) + G6P/Kg6p_hk + ADP/Kadp_hk + G6P*ADP/(Kg6p_hk*Kadp_hk) + Glu_in*ADP/(Kgluin_hk*Kadp_hk) + G6P*ATP/(Kg6p_hk*Katp_hk)) + f2_hk/(Kgluin2_hk*Katp_hk)*(Glu_in*ATP - G6P*ADP/Keq_hk)/(1 + Glu_in/Kgluin2_hk + ATP/Katp_hk + Glu_in*ATP/(Kgluin2_hk*Katp_hk) + G6P/Kg6p_hk + ADP/Kadp_hk + G6P*ADP/(Kg6p_hk*Kadp_hk) + Glu_in*ADP/(Kgluin2_hk*Kadp_hk) + G6P*ATP/(Kg6p_hk*Katp_hk)));
  HPI_reaction := (Vf_hpi*G6P/Kg6p_hpi - Vr_hpi*F6P/Kf6p_hpi)/(1 + G6P/Kg6p_hpi + F6P/Kf6p_hpi + E4P/Kery4p_hpi + FBP/Kfbp_hpi + sixPG/K6pg_hpi);
  Lac_in := y__16;
  Lac_out := y__17;
  LDH_reaction := (Vf_ldh*(NADH*Pyr/(alpha_ldh*Kpyr_ldh*Knadh_ldh)) - Vr_ldh*(Lac_in*NAD/(beta_ldh*Klacin_ldh*Knad_ldh)))/(1 + Pyr/Kpyr_ldh + NADH/Knadh_ldh + NADH*Pyr/(alpha_ldh*Kpyr_ldh*Knadh_ldh) + Lac_in*NAD/(beta_ldh*Klacin_ldh*Knad_ldh) + Lac_in/Klacin_ldh + NAD/Knad_ldh);
  MCT_reaction := Vf_mct1*(Lac_in - Lac_out/Keq_mct1)/(Klacin_mct1*(1 + Lac_out/Klacout_mct1) + Lac_in);
  N1_PFK := F6P*(1 + F26BP/(alpha_pfk1*Kf26bp_pfk1))/(Kf6p_pfk1*(1 + F26BP/Kf26bp_pfk1));
  N2_PFK := (1 + F6P*(1 + F26BP/(alpha_pfk1*Kf26bp_pfk1))/(Kf6p_pfk1*(1 + F26BP/Kf26bp_pfk1)))^3;
  NAD := y__9;
  NADH := y__10;
  PEP := y__14;
  PFK1_reaction := Vf_pfk1*(0.2 + 0.8/(1 - 23.68/50))*(ATP/Katp_pfk1/(1 + ATP/Katp_pfk1))*((1 + beta_pfk1*F26BP/(alpha_pfk1*Kf26bp_pfk1))/(1 + F26BP/(alpha_pfk1*Kf26bp_pfk1)))*(N1_PFK*N2_PFK/(D1_PFK + D2_PFK) - ADP*FBP/(Kadp_pfk1*Kfbp_pfk1*Keq_pfk1)/(ADP/Kadp_pfk1 + FBP/Kfbp_pfk1 + ADP*FBP/(Kadp_pfk1*Kfbp_pfk1) + 1));
  PGAM_reaction := (Vf_pgam*threePG/K3pg_pgam - Vr_pgam*twoPG/K2pg_pgam)/(1 + threePG/K3pg_pgam + twoPG/K2pg_pgam);
  PGK_reaction := (Vf_pgk*(thirteenBPG*ADP/(alpha_pgk*Ka_pgk*Kb_pgk)) - Vr_pgk*(threePG*ATP/(beta_pgk*Kp_pgk*Kq_pgk)))/(1 + thirteenBPG/Ka_pgk + ADP/Kb_pgk + thirteenBPG*ADP/(alpha_pgk*Ka_pgk*Kb_pgk) + threePG*ATP/(beta_pgk*Kp_pgk*Kq_pgk) + threePG/Kp_pgk + ATP/Kq_pgk);
  PYK_reaction := Vf_pyk*(PEP*ADP/(Kpep_pyk*Kadp_pyk) - Pyr*ATP/(Kpep_pyk*Kadp_pyk*Keq_pyk))/((1 + PEP/Kpep_pyk + Pyr/Kpyr_pyk)*(1 + ADP/Kadp_pyk + ATP/Katp_pyk));
  Pyr := y__15;
  thirteenBPG := y__11;
  threePG := y__12;
  TPI_reaction := (Vf_tpi*(DHAP/Kdhap_tpi) - Vr_tpi*(G3P/Kg3p_tpi))/(1 + DHAP/Kdhap_tpi + G3P/Kg3p_tpi);
  twoPG := y__13;

  // Reactions:
  R_1: 1.719757 y__1 + y__18 => 2.719757 y__18; Vf_glut*f1_glut*(1/((1 + y__1/Kgluin_glut)*Kgluout_glut + y__18))*(y__1/Keq_glut) + Vf_glut*f2_glut*(1/((1 + y__1/Kgluin1_glut)*Kgluout1_glut + y__18))*(y__1/Keq1_glut);
  R_2: y__1 + 1.719757 y__18 => 2.719757 y__1; Vf_glut*f1_glut*(y__18/((1 + y__1/Kgluin_glut)*Kgluout_glut + y__18)) + Vf_glut*f2_glut*(y__18/((1 + y__1/Kgluin1_glut)*Kgluout1_glut + y__18));
  R_3: y__16 + y__17 => 2 y__17; Vf_mct1*(y__16/((1 + y__17/Klacout_mct1)*Klacin_mct1 + y__16));
  R_4: y__16 + y__17 => 2 y__16; Vf_mct1*(y__17/((1 + y__17/Klacout_mct1)*Klacin_mct1 + y__16)/Keq_mct1);
  R_5: y__10 + y__15 + y__16 + y__9 => 2 y__16 + 2 y__9; y__10*y__15*Vf_ldh/(alpha_ldh*Kpyr_ldh*Knadh_ldh)/(1 + y__15/Kpyr_ldh + y__10/Knadh_ldh + y__10*y__15/(alpha_ldh*Kpyr_ldh*Knadh_ldh) + y__16*y__9/(beta_ldh*Knad_ldh*Klacin_ldh) + y__16/Klacin_ldh + y__9/Knad_ldh);
  R_6: y__10 + y__15 + y__16 + y__9 => 2 y__10 + 2 y__15; y__16*y__9*Vr_ldh/(beta_ldh*Knad_ldh*Klacin_ldh)/(1 + y__15/Kpyr_ldh + y__10/Knadh_ldh + y__10*y__15/(alpha_ldh*Kpyr_ldh*Knadh_ldh) + y__16*y__9/(beta_ldh*Knad_ldh*Klacin_ldh) + y__16/Klacin_ldh + y__9/Knad_ldh);
  R_7: y__14 + y__15 + y__2 + y__4 => 2 y__15 + 2 y__2; Vf_pyk*(y__14*y__4/((1 + y__14/Kpep_pyk + y__15/Kpyr_pyk)*(1 + y__4/Kadp_pyk + y__2/Katp_pyk))/(Kpep_pyk*Kadp_pyk));
  R_8: y__14 + y__15 + y__2 + y__4 => 2 y__14 + 2 y__4; Vf_pyk*(y__15*y__2/((1 + y__14/Kpep_pyk + y__15/Kpyr_pyk)*(1 + y__4/Kadp_pyk + y__2/Katp_pyk))/(Kpep_pyk*Keq_pyk*Kadp_pyk));
  R_9: y__13 + y__14 => 2 y__14; y__13*Vf_eno/K2pg_eno/(1 + y__13/K2pg_eno + y__14/Kpep_eno);
  R_10: y__13 + y__14 => 2 y__13; y__14*Vr_eno/Kpep_eno/(1 + y__13/K2pg_eno + y__14/Kpep_eno);
  R_11: y__12 + y__13 => 2 y__13; y__12*Vf_pgam/K3pg_pgam/(1 + y__12/K3pg_pgam + y__13/K2pg_pgam);
  R_12: y__12 + y__13 => 2 y__12; y__13*Vr_pgam/K2pg_pgam/(1 + y__12/K3pg_pgam + y__13/K2pg_pgam);
  R_13: y__11 + y__12 + y__2 + y__4 => 2 y__12 + 2 y__2; y__11*y__4*Vf_pgk/(alpha_pgk*Kb_pgk*Ka_pgk)/(1 + y__11/Ka_pgk + y__4/Kb_pgk + y__11*y__4/(alpha_pgk*Kb_pgk*Ka_pgk) + y__12*y__2/(beta_pgk*Kq_pgk*Kp_pgk) + y__12/Kp_pgk + y__2/Kq_pgk);
  R_14: y__11 + y__12 + y__2 + y__4 => 2 y__11 + 2 y__4; y__12*y__2*Vr_pgk/(beta_pgk*Kq_pgk*Kp_pgk)/(1 + y__11/Ka_pgk + y__4/Kb_pgk + y__11*y__4/(alpha_pgk*Kb_pgk*Ka_pgk) + y__12*y__2/(beta_pgk*Kq_pgk*Kp_pgk) + y__12/Kp_pgk + y__2/Kq_pgk);
  R_15: y__10 + y__11 + y__8 + y__9 => 2 y__10 + 2 y__11; y__9*y__8*cPi*Vf_gapdh/(Kpi_gapdh*Knad_gapdh*Kg3p_gapdh)/(1 + NAD/Knad_gapdh + NAD*G3P/(Knad_gapdh*Kg3p_gapdh) + NAD*G3P*cPi/(Knad_gapdh*Kg3p_gapdh*Kpi_gapdh) + thirteenBPG*NADH/(Kbpg_gapdh*Knadh_gapdh) + NADH/Knadh_gapdh);
  R_16: y__10 + y__11 + y__8 + y__9 => 2 y__8 + 2 y__9; y__11*y__10*Vr_gapdh/(Knadh_gapdh*Kbpg_gapdh)/(1 + NAD/Knad_gapdh + NAD*G3P/(Knad_gapdh*Kg3p_gapdh) + NAD*G3P*cPi/(Knad_gapdh*Kg3p_gapdh*Kpi_gapdh) + thirteenBPG*NADH/(Kbpg_gapdh*Knadh_gapdh) + NADH/Knadh_gapdh);
  R_17: y__6 + y__7 + y__8 => 2 y__7 + 2 y__8; y__6*Vf_aldo/Kfbp_aldo/(1 + y__6/Kfbp_aldo + y__7/Kdhap_aldo + y__8/Kg3p_aldo + y__7*y__8/(Kg3p_aldo*Kdhap_aldo));
  R_18: y__7 + y__8 => 2 y__8; y__7*Vf_tpi/Kdhap_tpi/(1 + y__7/Kdhap_tpi + y__8/Kg3p_tpi);
  R_19: y__7 + y__8 => 2 y__7; y__8*Vr_tpi/Kg3p_tpi/(1 + y__7/Kdhap_tpi + y__8/Kg3p_tpi);
  R_20: y__6 + y__7 + y__8 => 2 y__6; y__7*y__8*Vr_aldo/(Kg3p_aldo*Kdhap_aldo)/(1 + y__6/Kfbp_aldo + y__7/Kdhap_aldo + y__8/Kg3p_aldo + y__7*y__8/(Kg3p_aldo*Kdhap_aldo));
  R_21: y__2 + y__5 => y__2 + y__4 + y__5 + y__6; Vf_pfk1*(y__2*y__5/(1 + F26BP/(alpha_pfk1*Kf26bp_pfk1))/Katp_pfk1/(1 + y__2/Katp_pfk1)*0.2*(1 + y__5/(Kf6p_pfk1*(1 + F26BP/Kf26bp_pfk1)) + y__5*(F26BP/(alpha_pfk1*Kf26bp_pfk1))/(Kf6p_pfk1*(1 + F26BP/Kf26bp_pfk1)))^3/(Kf6p_pfk1*(1 + F26BP/Kf26bp_pfk1))/((1 + ATP/Kiatp_pfk1)^4*(1 + cCIT/Kcit_pfk1)^4*L_pfk1/(1 + F26BP/Kf26bp_pfk1)^4 + (1 + F6P*(1 + F26BP/(alpha_pfk1*Kf26bp_pfk1))/(Kf6p_pfk1*(1 + F26BP/Kf26bp_pfk1)))^4)) + Vf_pfk1*(y__2*y__5/(1 + F26BP/(alpha_pfk1*Kf26bp_pfk1))/Katp_pfk1/(1 + y__2/Katp_pfk1)*1.519757*(1 + y__5/(Kf6p_pfk1*(1 + F26BP/Kf26bp_pfk1)) + y__5*(F26BP/(alpha_pfk1*Kf26bp_pfk1))/(Kf6p_pfk1*(1 + F26BP/Kf26bp_pfk1)))^3/(Kf6p_pfk1*(1 + F26BP/Kf26bp_pfk1))/((1 + ATP/Kiatp_pfk1)^4*(1 + cCIT/Kcit_pfk1)^4*L_pfk1/(1 + F26BP/Kf26bp_pfk1)^4 + (1 + F6P*(1 + F26BP/(alpha_pfk1*Kf26bp_pfk1))/(Kf6p_pfk1*(1 + F26BP/Kf26bp_pfk1)))^4)) + F26BP*Vf_pfk1*beta_pfk1*(y__2*y__5/(Kf26bp_pfk1*alpha_pfk1)/(1 + F26BP/(alpha_pfk1*Kf26bp_pfk1))/Katp_pfk1/(1 + y__2/Katp_pfk1)*1.519757*(1 + y__5/(Kf6p_pfk1*(1 + F26BP/Kf26bp_pfk1)) + y__5*(F26BP/(alpha_pfk1*Kf26bp_pfk1))/(Kf6p_pfk1*(1 + F26BP/Kf26bp_pfk1)))^3/(Kf6p_pfk1*(1 + F26BP/Kf26bp_pfk1))/((1 + ATP/Kiatp_pfk1)^4*(1 + cCIT/Kcit_pfk1)^4*L_pfk1/(1 + F26BP/Kf26bp_pfk1)^4 + (1 + F6P*(1 + F26BP/(alpha_pfk1*Kf26bp_pfk1))/(Kf6p_pfk1*(1 + F26BP/Kf26bp_pfk1)))^4));
  R_22: y__2 + y__4 + y__6 => y__2; Vf_pfk1*(y__2*y__4/(1 + F26BP/(alpha_pfk1*Kf26bp_pfk1))/Katp_pfk1/(1 + y__2/Katp_pfk1)*1.719757*y__6/(Kfbp_pfk1*Keq_pfk1*Kadp_pfk1)/(y__4/Kadp_pfk1 + y__6/Kfbp_pfk1 + y__4*y__6/(Kfbp_pfk1*Kadp_pfk1) + 1));
  R_23: 1.719757 y__2 + 1.719757 y__5 => 1.719757 y__4 + 1.719757 y__6; F26BP*Vf_pfk1*(y__5/((1 + ATP/Kiatp_pfk1)^4*(1 + cCIT/Kcit_pfk1)^4*L_pfk1/(1 + F26BP/Kf26bp_pfk1)^4 + (1 + F6P*(1 + F26BP/(alpha_pfk1*Kf26bp_pfk1))/(Kf6p_pfk1*(1 + F26BP/Kf26bp_pfk1)))^4)/(Kf26bp_pfk1*alpha_pfk1)/(Kf6p_pfk1*(1 + F26BP/Kf26bp_pfk1))*y__2*(1 + y__5/(Kf6p_pfk1*(1 + F26BP/Kf26bp_pfk1)) + y__5*(F26BP/(alpha_pfk1*Kf26bp_pfk1))/(Kf6p_pfk1*(1 + F26BP/Kf26bp_pfk1)))^3/(1 + F26BP/(alpha_pfk1*Kf26bp_pfk1))/Katp_pfk1/(1 + y__2/Katp_pfk1));
  R_24: 0.2 y__2 + 0.2 y__5 => 0.2 y__4 + 0.2 y__6; F26BP*Vf_pfk1*beta_pfk1*(y__2/(Kf26bp_pfk1*alpha_pfk1)/(1 + F26BP/(alpha_pfk1*Kf26bp_pfk1))/Katp_pfk1/(1 + y__2/Katp_pfk1)*y__5*(1 + y__5/(Kf6p_pfk1*(1 + F26BP/Kf26bp_pfk1)) + y__5*(F26BP/(alpha_pfk1*Kf26bp_pfk1))/(Kf6p_pfk1*(1 + F26BP/Kf26bp_pfk1)))^3/(Kf6p_pfk1*(1 + F26BP/Kf26bp_pfk1))/((1 + ATP/Kiatp_pfk1)^4*(1 + cCIT/Kcit_pfk1)^4*L_pfk1/(1 + F26BP/Kf26bp_pfk1)^4 + (1 + F6P*(1 + F26BP/(alpha_pfk1*Kf26bp_pfk1))/(Kf6p_pfk1*(1 + F26BP/Kf26bp_pfk1)))^4)) + F26BP*Vf_pfk1*beta_pfk1*(y__5/((1 + ATP/Kiatp_pfk1)^4*(1 + cCIT/Kcit_pfk1)^4*L_pfk1/(1 + F26BP/Kf26bp_pfk1)^4 + (1 + F6P*(1 + F26BP/(alpha_pfk1*Kf26bp_pfk1))/(Kf6p_pfk1*(1 + F26BP/Kf26bp_pfk1)))^4)/(Kf26bp_pfk1*alpha_pfk1)/(Kf6p_pfk1*(1 + F26BP/Kf26bp_pfk1))*y__2*(1 + y__5/(Kf6p_pfk1*(1 + F26BP/Kf26bp_pfk1)) + y__5*(F26BP/(alpha_pfk1*Kf26bp_pfk1))/(Kf6p_pfk1*(1 + F26BP/Kf26bp_pfk1)))^3/(Kf26bp_pfk1*alpha_pfk1)/(1 + F26BP/(alpha_pfk1*Kf26bp_pfk1))/Katp_pfk1/(1 + y__2/Katp_pfk1));
  R_25: 1.519757 y__2 + 1.519757 y__5 => 1.519757 y__4 + 1.519757 y__6; F26BP*Vf_pfk1*beta_pfk1*(y__5*y__2/((1 + ATP/Kiatp_pfk1)^4*(1 + cCIT/Kcit_pfk1)^4*L_pfk1/(1 + F26BP/Kf26bp_pfk1)^4 + (1 + F6P*(1 + F26BP/(alpha_pfk1*Kf26bp_pfk1))/(Kf6p_pfk1*(1 + F26BP/Kf26bp_pfk1)))^4)/(Kf26bp_pfk1*alpha_pfk1)/(Kf6p_pfk1*(1 + F26BP/Kf26bp_pfk1))/(Kf26bp_pfk1*alpha_pfk1)/(1 + F26BP/(alpha_pfk1*Kf26bp_pfk1))/Katp_pfk1/(1 + y__2/Katp_pfk1))*(1 + y__5/(Kf6p_pfk1*(1 + F26BP/Kf26bp_pfk1)) + y__5*(F26BP/(alpha_pfk1*Kf26bp_pfk1))/(Kf6p_pfk1*(1 + F26BP/Kf26bp_pfk1)))^3;
  R_26: y__2 + y__4 + y__6 => y__2 + y__4 + y__5; F26BP*Vf_pfk1*beta_pfk1*(y__2*y__4/(Kf26bp_pfk1*alpha_pfk1)/(1 + F26BP/(alpha_pfk1*Kf26bp_pfk1))/Katp_pfk1/(1 + y__2/Katp_pfk1)*0.2*y__6/(Kfbp_pfk1*Keq_pfk1*Kadp_pfk1)/(y__4/Kadp_pfk1 + y__6/Kfbp_pfk1 + y__4*y__6/(Kfbp_pfk1*Kadp_pfk1) + 1));
  R_27: y__2 + y__4 + y__6 => 2 y__2 + y__4 + y__5; F26BP*Vf_pfk1*beta_pfk1*(y__2*y__4/(Kf26bp_pfk1*alpha_pfk1)/(1 + F26BP/(alpha_pfk1*Kf26bp_pfk1))/Katp_pfk1/(1 + y__2/Katp_pfk1)*1.519757*y__6/(Kfbp_pfk1*Keq_pfk1*Kadp_pfk1)/(y__4/Kadp_pfk1 + y__6/Kfbp_pfk1 + y__4*y__6/(Kfbp_pfk1*Kadp_pfk1) + 1));
  R_28: y__2 + y__4 + y__6 => y__2 + y__4 + y__5 + y__6; Vf_pfk1*(y__2*y__4/(1 + F26BP/(alpha_pfk1*Kf26bp_pfk1))/Katp_pfk1/(1 + y__2/Katp_pfk1)*0.2*y__6/(Kfbp_pfk1*Keq_pfk1*Kadp_pfk1)/(y__4/Kadp_pfk1 + y__6/Kfbp_pfk1 + y__4*y__6/(Kfbp_pfk1*Kadp_pfk1) + 1));
  R_29: y__2 + y__4 + y__6 => 2 y__2 + y__4 + y__5 + y__6; Vf_pfk1*(y__2*y__4/(1 + F26BP/(alpha_pfk1*Kf26bp_pfk1))/Katp_pfk1/(1 + y__2/Katp_pfk1)*1.519757*y__6/(Kfbp_pfk1*Keq_pfk1*Kadp_pfk1)/(y__4/Kadp_pfk1 + y__6/Kfbp_pfk1 + y__4*y__6/(Kfbp_pfk1*Kadp_pfk1) + 1));
  R_30: y__2 + y__5 => ; Vf_pfk1*(y__2*y__5/(1 + F26BP/(alpha_pfk1*Kf26bp_pfk1))/Katp_pfk1/(1 + y__2/Katp_pfk1)*1.719757*(1 + y__5/(Kf6p_pfk1*(1 + F26BP/Kf26bp_pfk1)) + y__5*(F26BP/(alpha_pfk1*Kf26bp_pfk1))/(Kf6p_pfk1*(1 + F26BP/Kf26bp_pfk1)))^3/(Kf6p_pfk1*(1 + F26BP/Kf26bp_pfk1))/((1 + ATP/Kiatp_pfk1)^4*(1 + cCIT/Kcit_pfk1)^4*L_pfk1/(1 + F26BP/Kf26bp_pfk1)^4 + (1 + F6P*(1 + F26BP/(alpha_pfk1*Kf26bp_pfk1))/(Kf6p_pfk1*(1 + F26BP/Kf26bp_pfk1)))^4));
  R_31: y__2 + y__5 => 2 y__2 + 2 y__5; F26BP*Vf_pfk1*beta_pfk1*(y__2*y__5/(Kf26bp_pfk1*alpha_pfk1)/(1 + F26BP/(alpha_pfk1*Kf26bp_pfk1))/Katp_pfk1/(1 + y__2/Katp_pfk1)*(-1.519757)*(1 + y__5/(Kf6p_pfk1*(1 + F26BP/Kf26bp_pfk1)) + y__5*(F26BP/(alpha_pfk1*Kf26bp_pfk1))/(Kf6p_pfk1*(1 + F26BP/Kf26bp_pfk1)))^3/(Kf6p_pfk1*(1 + F26BP/Kf26bp_pfk1))/((1 + ATP/Kiatp_pfk1)^4*(1 + cCIT/Kcit_pfk1)^4*L_pfk1/(1 + F26BP/Kf26bp_pfk1)^4 + (1 + F6P*(1 + F26BP/(alpha_pfk1*Kf26bp_pfk1))/(Kf6p_pfk1*(1 + F26BP/Kf26bp_pfk1)))^4));
  R_32: y__3 + y__5 + y__6 => 2 y__5 + y__6; y__3*Vf_hpi/Kg6p_hpi/(1 + G6P/Kg6p_hpi + F6P/Kf6p_hpi + E4P/Kery4p_hpi + FBP/Kfbp_hpi + sixPG/K6pg_hpi);
  R_33: y__3 + y__5 + y__6 => 2 y__3 + y__6; y__5*Vr_hpi/Kf6p_hpi/(1 + G6P/Kg6p_hpi + F6P/Kf6p_hpi + E4P/Kery4p_hpi + FBP/Kfbp_hpi + sixPG/K6pg_hpi);
  R_34: y__2 + y__4 + y__6 => y__2 + y__6; F26BP*Vf_pfk1*beta_pfk1*(y__2*y__4/(Kf26bp_pfk1*alpha_pfk1)/(1 + F26BP/(alpha_pfk1*Kf26bp_pfk1))/Katp_pfk1/(1 + y__2/Katp_pfk1)*1.719757*y__6/(Kfbp_pfk1*Keq_pfk1*Kadp_pfk1)/(y__4/Kadp_pfk1 + y__6/Kfbp_pfk1 + y__4*y__6/(Kfbp_pfk1*Kadp_pfk1) + 1));
  R_35: y__1 + y__2 + y__3 + y__4 => y__1 + y__2 + 2 y__3 + 2 y__4; Vf_hk*f1_hk*(y__1*0.2*y__2/(Kgluin_hk*Katp_hk)/(1 + y__1/Kgluin_hk + y__2/Katp_hk + y__1*y__2/(Kgluin_hk*Katp_hk) + y__3/Kg6p_hk + y__4/Kadp_hk + y__3*y__4/(Kg6p_hk*Kadp_hk) + y__1*y__4/(Kgluin_hk*Kadp_hk) + y__3*y__2/(Kg6p_hk*Katp_hk))) + Vf_hk*f2_hk*(y__1*0.2*y__2/(Kgluin2_hk*Katp_hk)/(1 + y__1/Kgluin2_hk + y__2/Katp_hk + y__1*y__2/(Kgluin2_hk*Katp_hk) + y__3/Kg6p_hk + y__4/Kadp_hk + y__3*y__4/(Kg6p_hk*Kadp_hk) + y__1*y__4/(Kgluin2_hk*Kadp_hk) + y__3*y__2/(Kg6p_hk*Katp_hk)));
  R_36: y__1 + y__2 + y__3 + y__4 => 2 y__3 + 2 y__4; Vf_hk*f1_hk*(y__1*1.519757*y__2/(Kgluin_hk*Katp_hk)/(1 + y__1/Kgluin_hk + y__2/Katp_hk + y__1*y__2/(Kgluin_hk*Katp_hk) + y__3/Kg6p_hk + y__4/Kadp_hk + y__3*y__4/(Kg6p_hk*Kadp_hk) + y__1*y__4/(Kgluin_hk*Kadp_hk) + y__3*y__2/(Kg6p_hk*Katp_hk))) + Vf_hk*f2_hk*(y__1*1.519757*y__2/(Kgluin2_hk*Katp_hk)/(1 + y__1/Kgluin2_hk + y__2/Katp_hk + y__1*y__2/(Kgluin2_hk*Katp_hk) + y__3/Kg6p_hk + y__4/Kadp_hk + y__3*y__4/(Kg6p_hk*Kadp_hk) + y__1*y__4/(Kgluin2_hk*Kadp_hk) + y__3*y__2/(Kg6p_hk*Katp_hk)));
  R_37: y__1 + y__2 + 1.719757 y__3 + 1.719757 y__4 => 2.719757 y__1 + 2.719757 y__2; Vf_hk*f1_hk*(y__4/Keq_hk)*(y__3/(Kgluin_hk*Katp_hk)/(1 + y__1/Kgluin_hk + y__2/Katp_hk + y__1*y__2/(Kgluin_hk*Katp_hk) + y__3/Kg6p_hk + y__4/Kadp_hk + y__3*y__4/(Kg6p_hk*Kadp_hk) + y__1*y__4/(Kgluin_hk*Kadp_hk) + y__3*y__2/(Kg6p_hk*Katp_hk))) + Vf_hk*f2_hk*(y__4/Keq_hk)*(y__3/(Kgluin2_hk*Katp_hk)/(1 + y__1/Kgluin2_hk + y__2/Katp_hk + y__1*y__2/(Kgluin2_hk*Katp_hk) + y__3/Kg6p_hk + y__4/Kadp_hk + y__3*y__4/(Kg6p_hk*Kadp_hk) + y__1*y__4/(Kgluin2_hk*Kadp_hk) + y__3*y__2/(Kg6p_hk*Katp_hk)));
  R_38: y__2 + y__4 + y__6 => 2 y__2 + y__4 + y__6; Vf_pfk1*(y__2*y__4/(1 + F26BP/(alpha_pfk1*Kf26bp_pfk1))/Katp_pfk1/(1 + y__2/Katp_pfk1)*0.2*y__6/(Kfbp_pfk1*Keq_pfk1*Kadp_pfk1)/(y__4/Kadp_pfk1 + y__6/Kfbp_pfk1 + y__4*y__6/(Kfbp_pfk1*Kadp_pfk1) + 1)) + F26BP*Vf_pfk1*beta_pfk1*(y__2*y__4/(Kf26bp_pfk1*alpha_pfk1)/(1 + F26BP/(alpha_pfk1*Kf26bp_pfk1))/Katp_pfk1/(1 + y__2/Katp_pfk1)*0.2*y__6/(Kfbp_pfk1*Keq_pfk1*Kadp_pfk1)/(y__4/Kadp_pfk1 + y__6/Kfbp_pfk1 + y__4*y__6/(Kfbp_pfk1*Kadp_pfk1) + 1));
  R_39: y__1 + y__2 + y__3 + y__4 => y__3 + y__4; Vf_hk*f1_hk*(y__1*0.2*y__2/(Kgluin_hk*Katp_hk)/(1 + y__1/Kgluin_hk + y__2/Katp_hk + y__1*y__2/(Kgluin_hk*Katp_hk) + y__3/Kg6p_hk + y__4/Kadp_hk + y__3*y__4/(Kg6p_hk*Kadp_hk) + y__1*y__4/(Kgluin_hk*Kadp_hk) + y__3*y__2/(Kg6p_hk*Katp_hk))) + Vf_hk*f2_hk*(y__1*0.2*y__2/(Kgluin2_hk*Katp_hk)/(1 + y__1/Kgluin2_hk + y__2/Katp_hk + y__1*y__2/(Kgluin2_hk*Katp_hk) + y__3/Kg6p_hk + y__4/Kadp_hk + y__3*y__4/(Kg6p_hk*Kadp_hk) + y__1*y__4/(Kgluin2_hk*Kadp_hk) + y__3*y__2/(Kg6p_hk*Katp_hk)));
end
